** written by FreeCAD inp file writer for CalculiX,Abaqus meshes
** highest dimension mesh elements only.

** Nodes
*Node, NSET=Nall
1, -5e-15, 5, 212
2, -5e-15, -5, 212
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

** Volume elements
*Element, TYPE=C3D10, ELSET=Evolumes
421, 394, 395, 224, 296, 425, 618, 619, 621, 620, 622
422, 381, 299, 385, 227, 624, 623, 437, 626, 625, 627
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
** Define element set Eall
*ELSET, ELSET=Eall
Evolumes


***********************************************************
** Element sets for materials and FEM element type (solid, shell, beam, fluid)
*ELSET,ELSET=FEMPart002_MaterialSolid
Evolumes

** Physical constants for SI(mm) unit system with Kelvins
*PHYSICAL CONSTANTS, ABSOLUTE ZERO=0, STEFAN BOLTZMANN=5.670374419e-11

***********************************************************
** Materials
** see information about units at file end
** FreeCAD material name: CalculiX-Steel
** Material (FEMPart (LongPendulum001))
*MATERIAL, NAME=FEMPart002_Material
*ELASTIC
210000,0.3
*DENSITY
7.9E-09
*EXPANSION, ZERO=0
1.2E-05

***********************************************************
** Sections
*SOLID SECTION, ELSET=FEMPart002_MaterialSolid, MATERIAL=FEMPart002_Material

***********************************************************
** At least one step is needed to run an CalculiX analysis of FreeCAD

***********************************************************
** MbDJoint FacePair CLOADs
*NSET,NSET=NSU1
8,100,101,111,112,113
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*NSET,NSET=NSU2
91,92,93,102,103,104
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*NSET,NSET=NSU3
94,95,105,106,107,394,396,419,422,425,450,451,452,453,454,455
*NSET,NSET=NSU4
96,97,98,99,108,109
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*NSET,NSET=NSL1
7,77,78,88,89,90
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*NSET,NSET=NSL2
68,69,70,79,80,81
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
***********************************************************
** Automatic 3-2-1 constraints
** nodeXYZ 157: x=-19.7989898732, y=-5, z=28.2010101268
** nodeYZ 154: x=19.7989898732, y=-5, z=28.2010101268
** nodeZ 177: x=19.7989898732, y=5, z=28.2010101268
*NSET,NSET=MbDFEM321Constraints
157,154,177
*STEP, INC=2000
*STATIC
1.0,1.0,1e-05,1.0
*BOUNDARY
157,1,1,0
157,2,2,0
157,3,3,0
154,2,2,0
154,3,3,0
177,3,3,0
** reaction forces for automatic 3-2-1 constraint nodes
*NODE PRINT,NSET=MbDFEM321Constraints
RF

***********************************************************
** MbDJoint FacePair CLOADs
*CLOAD
** MbDFEM transverse_force
8,1,-5.164253389242E-18
8,3,1.99150004734E-49
100,1,-0.01788949850666
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433,3,1.030962748747E-33
** MbDFEM axial_force
** MbDFEM bending_torque
** MbDFEM axial_torque

***********************************************************
** MbDPart D'Alembert element loads
*DLOAD
421,GRAV,724.050134054,-0.7719397877687,-3.935980889261E-16,-0.6356956536423
422,GRAV,724.7211256785,-0.1665918574106,-9.309774012071E-17,0.9860259393365
423,GRAV,717.9394105447,-0.9873512893311,-2.680008444121E-16,-0.1585478837963
424,GRAV,717.9394105447,-0.7757973571219,-1.133813770129E-16,0.6309821397494
425,GRAV,718.6013110483,-0.1606059833694,-5.367671354707E-16,-0.9870186006889
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773,GRAV,1245.141219546,-0.9989548074634,-1.005620741007E-16,-0.04570878083908

***********************************************************
** MbDAssembly gravity
*DLOAD
Eall,GRAV,9810,1,0,-6.162975822039E-33

***********************************************************
** Outputs --> frd file
*NODE FILE
U
*EL FILE
S, E
*OUTPUT, FREQUENCY=1
***********************************************************
*END STEP

***********************************************************
** CalculiX Input file
**   written by    --> FreeCAD 26.3.0
**   written on    --> Wed Sep 23 14:42:37 2026
**   file name     --> RealisticPendulum.FCStd
**   analysis name --> FEMPart002
**
**
***********************************************************
**  About units:
**  See ccx manual, ccx does not know about any unit.
**  Golden rule: The user must make sure that the numbers they provide have consistent units.
**  The user is the FreeCAD calculix writer module ;-)
**
**  The unit system which is used at Guido Dhondt's company: mm, N, s, K
**  Since Length and Mass are connected by Force, if Length is mm the Mass is in t to get N
**  The following units are used to write to inp file:
**
**  Length: mm (this includes the mesh geometry)
**  Mass: t
**  TimeSpan: s
**  Temperature: K
**
**  This leads to:
**  Force: N
**  Pressure: N/mm^2 == MPa (Young's Modulus has unit Pressure)
**  Density: t/mm^3
**  Gravity: mm/s^2
**  Thermal conductivity: t*mm/K/s^3 == as W/m/K == kW/mm/K
**  Specific Heat: mm^2/s^2/K = J/kg/K == kJ/t/K
**
